// COMSOL Multiphysics 6.2.0.290 model "A3.mph"
// Outline of the model tree

Parameters
  ri = 0.025 [m]  // Innenradius
  ra = 0.045 [m]  // Aussenradius
  Ti = 80 [degC]  // Innentemperatur
  Ta = 20 [degC]  // Umgebungstemperatur
  ha = 5 [W/(m^2*K)]  // Wärmeübergangskoeffizient
  k = 0.5 [W/(m*K)]  // Wärmeleitfähigkeit

Geometry
  geom1 "Geometry 1" (2D, length unit m)
    c1: Circle | r = ri; angle = 90
    c2: Circle | r = ra; angle = 90
    dif1: Difference | input = c2; input2 = c1
    ls1: LineSegment | vertex1 = dif1(1) points 1; vertex2 = dif1(1) points 2
    fin: Finalize "Form Union"

Materials
  mat1: Common "Material 1" on all domains
    def "Basic"
      thermalconductivity = k
      density = 1
      heatcapacity = 1

Physics
  ht: HeatTransfer "Heat Transfer in Solids" on all domains
    dependent variable T
    solid1: SolidHeatTransferModel "Solid 1" (default)
    init1: init "Initial Values 1" (default)
    ins1: ThermalInsulation (default)
    sym1: Symmetry on boundaries 1, 2
    hf1: HeatFluxBoundary "Heat Flux 1" on boundaries 4 | HeatFluxType = ConvectiveHeatFlux; h = ha; Text = Ta
    temp1: TemperatureBoundary "Temperature 1" on boundaries 3 | T0 = Ti

Mesh
  mesh1 "Mesh 1" (physics-controlled)
    size: MeshSizeDefault | hauto = 1

Studies
  std1 "Study 1"
    stat: Stationary

Solver configurations
  sol1 "Solution 1" (study std1)
    v1: Variables "Dependent Variables 1"
    s1: Stationary "Stationary Solver 1"
      fc1: FullyCoupled | linsolver = d1; initstep = 0.01; minstep = 1.0E-6; maxiter = 50
      d1: Direct "Direct, heat transfer variables (ht)" | linsolver = pardiso; pivotperturb = 1.0E-13

Datasets
  dset1: Solution | solution = sol1
  cln1: CutLine2D | data = dset1; genpoints = {{0.0225, 0}, {0.0225, 0.045}}

Tables
  mm1: Table "Maximum and Minimum Values"
    // Max/min line
    X | Y | Temperature (K)
    0.045 | 0 | 340.599
    1.53081e-18 | 0.025 | 353.15

Plots
  pg1: PlotGroup2D "Temperature (ht)" | data = dset1
    surf1: Surface | expr = T; unit = degC
  pg2: PlotGroup1D "1D Plot Group 2" | data = dset1
    lngr1: LineGraph on boundaries 2 | data = cln1; expr = T; unit = degC

Exports
  data1: Data
    data = dset1
    expr = T
    unit = degC
    filename = C:\Users\mauro.schegg\OneDrive - OST\Unterricht\HS2024\CP\Abgabe_Comsol\Data2D.txt
  data2: Data
    data = dset1
    expr = T
    unit = degC
    filename = C:\Users\mauro.schegg\OneDrive - OST\Unterricht\HS2024\CP\Abgabe_Comsol\Data2D2.txt
    level = line