// COMSOL Multiphysics 6.2.0.290 model "P1_2_Durchflussmessung_2D_Albertin_Schegg.mph"
// Outline of the model tree

Parameters
  T_Wasser_Inlet = 20[degC]  // Temperatur des Wassers am linken Eingang
  c_Wasser = 4190[J/kg/K]  // spezifische Wärmekapazität Wasser
  k_Wasser = 0.6[W/m/K]  // Wärmeleitfähigkeit Wasser
  rho_Wasser = 997[kg/m^3]  // Dichte Wasser
  Q_General_source = 10000[W/m^2]
  Q_Heat_rate = 0.05[W]  // Heizrate
  v_Wasser = 1[m/s]  // Geschwindigkeit des Wassers
  R_Total = 0.7[mm]  // Radius des Rohres
  R_aussen = 0.2[mm]  // Radius des Rohres aussen
  R_innen = R_Total - R_aussen  // Radius des Rohres innen
  c_Aluminium = 904[J/kg/K]  // spezifische Wärmekapazität Aluminium
  k_Aluminium = 235[W/m/K]  // Wärmeleitfähigkeit Aluminium
  rho_Aluminium = 2700[kg/m^3]  // Dichte Aluminium
  c_Glas = 840[J/kg/K]  // spezifische Wärmekapazität Glas
  k_Glas = 0.8[W/m/K]  // Wärmeleitfähigkeit Glas
  rho_Glas = 2500[kg/m^3]  // Dichte Glas

Variables
  var1 "Variables 1"
    v_Wasser_Parabel = v_Wasser * (1 - (r/R_innen)^2)

Probes
  bnd1: Boundary "Sensor_1_Aluminium" on boundaries 20
    expr = T
    unit = degC
    descr = Temperature
    axisym = 2d
    intsurface = on
    table = tbl1
  bnd2: Boundary "Sensor_2_Aluminium" on boundaries 24
    expr = T
    unit = degC
    descr = Temperature
    axisym = 2d
    intsurface = on
    table = tbl1
  bnd3: Boundary "Sensor_1_Glas" on boundaries 20
    expr = T
    unit = degC
    descr = Temperature
    axisym = 2d
    intsurface = on
    table = tbl1
  bnd4: Boundary "Sensor_2_Glas" on boundaries 24
    expr = T
    unit = degC
    descr = Temperature
    axisym = 2d
    intsurface = on
    table = tbl1

Geometry
  geom1 "Geometry 1" (2D axisymmetric, length unit mm)
    r1: Rectangle "Rohrabschnitt_4" | pos = {0, 9}; size = {R_innen, 2}
    r2: Rectangle "Sensor_2" | pos = {0, 8}; size = {R_innen, 1}
    r3: Rectangle "Rohraschnitt_3" | pos = {0, 6}; size = {R_innen, 2}
    r4: Rectangle "Heizquelle" | pos = {0, 5}; size = {R_innen, 1}
    r5: Rectangle "Rohraschnitt_2" | pos = {0, 3}; size = {R_innen, 2}
    r6: Rectangle "Sensor_1" | pos = {0, 2}; size = {R_innen, 1}
    r7: Rectangle "Rohrabschnitt_1" | size = {R_innen, 2}
    r8: Rectangle "A_Rohrabschnitt_4" | pos = {R_innen, 9}; size = {R_aussen, 2}
    r9: Rectangle "A_Sensor_2" | pos = {R_innen, 8}; size = {R_aussen, 1}
    r10: Rectangle "A_Rohraschnitt_3" | pos = {R_innen, 6}; size = {R_aussen, 2}
    r11: Rectangle "A_Heizquelle" | pos = {R_innen, 5}; size = {R_aussen, 1}
    r12: Rectangle "A_Rohraschnitt_2" | pos = {R_innen, 3}; size = {R_aussen, 2}
    r13: Rectangle "A_Sensor_1" | pos = {R_innen, 2}; size = {R_aussen, 1}
    r14: Rectangle "A_Rohrabschnitt_1" | pos = {R_innen, 0}; size = {R_aussen, 2}
    fin: Finalize "Form Union"
    cmd1: CompositeDomains "Form Composite Domains 1" | input = fin(1) domains 1-7

Materials
  mat1: Common "Wasser" on domains 1
    def "Basic"
      heatcapacity = c_Wasser
      thermalconductivity = k_Wasser
      density = rho_Wasser
  sw1: Switch "Material Switch 1" on domains 2-8
    mat2: Common "Aluminium"
      def "Basic"
        heatcapacity = c_Aluminium
        thermalconductivity = k_Aluminium
        density = rho_Aluminium
    mat3: Common "Glas"
      def "Basic"
        heatcapacity = c_Glas
        thermalconductivity = k_Glas
        density = rho_Glas

Physics
  ht1: HeatTransferInSolidsAndFluids on all domains
    dependent variable T
    RadiationSettings.opaque = ht2.dfltopaque
    solid1: SolidHeatTransferModel "Solid 1" (default)
    init1: init "Initial Values 1" (default)
    axi1: AxialSymmetry (default)
    ins1: ThermalInsulation (default)
    fluid2: FluidHeatTransferModel "Wasser_Parabel" on domains 1 | u = {0, 0, v_Wasser_Parabel}
    temp1: TemperatureBoundary "Temperature 1" on boundaries 2 | T0 = T_Wasser_Inlet
    hs2: HeatSource (disabled) on domains 5 | heatSourceType = HeatRate; P0 = Q_Heat_rate
    bhs1: BoundaryHeatSource on boundaries 22 | Pb = Q_Heat_rate; Qb_input = Q_General_source

Mesh
  mesh1 "Mesh 1" (physics-controlled)
    size: MeshSizeDefault | hauto = 1

Studies
  std1 "Study 1"
    matsw: MaterialSweep | pname = matsw.comp1.sw1; plistarr = range(1,1,2); pcase = all; useaccumtable = on
    stat: Stationary | useparam = on; sweeptype = filled; pname = v_Wasser; plistarr = range(0.1,0.01,1); punit = m/s

Solver configurations
  sol1 "Solution 1" (study std1)
    v1: Variables "Dependent Variables 1"
    s1: Stationary "Stationary Solver 1"
      p1: Parametric | sweeptype = filled; pname = v_Wasser; plistarr = range(0.1,0.01,1); punit = m/s
      fc1: FullyCoupled | linsolver = d1; initstep = 0.01; minstep = 1.0E-6; maxiter = 50
      d1: Direct "Direct, heat transfer variables (ht1)" | linsolver = pardiso; pivotperturb = 1.0E-13
  sol2 "Parametric Solutions 1" (study std1)

Datasets
  dset1: Solution | solution = sol1
  dset2: Solution | solution = sol2
  dset3: Solution "Probe Solution 3" | solution = sol1
  avh1: Average "Sensor_1_Aluminium" on boundaries 20 | data = dset3
  avh2: Average "Sensor_2_Aluminium" on boundaries 24 | data = dset3
  avh3: Average "Sensor_1_Glas" on boundaries 20 | data = dset3
  avh4: Average "Sensor_2_Glas" on boundaries 24 | data = dset3

Derived values
  pev1: EvalPoint "Sensor_1_Aluminium" | data = avh1; table = tbl2; expr = T
  pev2: EvalPoint "Sensor_2_Aluminium" | data = avh2; table = tbl2; expr = T
  pev3: EvalPoint "Sensor_1_Glas" | data = avh3; table = tbl2; expr = T
  pev4: EvalPoint "Sensor_2_Glas" | data = avh4; table = tbl2; expr = T

Tables
  tbl1: Table "Probe Table 1"
    v_Wasser (m/s) | Temperature (degC), Sensor_1_Aluminium | Temperature (degC), Sensor_2_Aluminium | Temperature (degC), Sensor_1_Glas | Temperature (degC), Sensor_2_Glas
    0.1 | 20 | 20.5802 | 20 | 20.5802
    0.11 | 20 | 20.5491 | 20 | 20.5491
    0.12 | 20 | 20.5216 | 20 | 20.5216
    0.13 | 20 | 20.4972 | 20 | 20.4972
    0.14 | 20 | 20.4753 | 20 | 20.4753
    0.15 | 20 | 20.4558 | 20 | 20.4558
    0.16 | 20 | 20.438 | 20 | 20.438
    0.17 | 20 | 20.4214 | 20 | 20.4214
    0.18 | 20 | 20.4058 | 20 | 20.4058
    0.19 | 20 | 20.3912 | 20 | 20.3912
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  tbl2: Table "Accumulated Probe Table 2"
    Material Switch 1 index | v_Wasser (m/s) | Temperature (degC), Sensor_1_Aluminium | Temperature (degC), Sensor_2_Aluminium | Temperature (degC), Sensor_1_Glas | Temperature (degC), Sensor_2_Glas
    1 | 0.1 | 20.2124 | 20.4558 | 20.2124 | 20.4558
    1 | 0.11 | 20.2057 | 20.4416 | 20.2057 | 20.4416
    1 | 0.12 | 20.1996 | 20.4289 | 20.1996 | 20.4289
    1 | 0.13 | 20.1941 | 20.4175 | 20.1941 | 20.4175
    1 | 0.14 | 20.1891 | 20.4071 | 20.1891 | 20.4071
    1 | 0.15 | 20.1845 | 20.3976 | 20.1845 | 20.3976
    1 | 0.16 | 20.1803 | 20.3889 | 20.1803 | 20.3889
    1 | 0.17 | 20.1763 | 20.3809 | 20.1763 | 20.3809
    1 | 0.18 | 20.1727 | 20.3735 | 20.1727 | 20.3735
    1 | 0.19 | 20.1692 | 20.3666 | 20.1692 | 20.3666
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
Plots
  pg1: PlotGroup1D "Probe Plot Group 1"
    tblp2: Table "Probe Table Graph 2" | table = tbl2; xaxisdata = 2
  pg2: PlotGroup2D "Temperature (ht1)" | data = dset2
    surf1: Surface | expr = T; unit = degC

Exports
  anim1: Animation
    giffilename = C:\Users\rino.albertin\OneDrive - OST\1 BSc FHO Sys CoE\3 Jahr\1 Semester\CoE_III Computational Engineering III\CP Wärme & Elektromagnetismus\Projekte\WL\Fork\CoP_Abgabe\Bilder\Durchflussmessung\2D\Alu.gif
    allarray = {1, 2, 3, 4, 5, 6, 7, 8, 9, 10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}
    maxframes = 50
  anim2: Animation
    giffilename = C:\Users\rino.albertin\OneDrive - OST\1 BSc FHO Sys CoE\3 Jahr\1 Semester\CoE_III Computational Engineering III\CP Wärme & Elektromagnetismus\Projekte\WL\Fork\CoP_Abgabe\Bilder\Durchflussmessung\2D\Glas.gif
    allarray = {92, 93, 94, 95, 96, 97, 98, 99, 100, 101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}
    maxframes = 50