// COMSOL Multiphysics 6.2.0.290 model "P1_2_D~1.MPH"
// Outline of the model tree

Parameters
  T_Wasser_Inlet = 20[degC]  // Temperatur des Wassers am linken Eingang
  c_Wasser = 4190[J/kg/K]  // spezifische Wärmekapazität Wasser
  k_Wasser = 0.6[W/m/K]  // Wärmeleitfähigkeit Wasser
  rho_Wasser = 997[kg/m^3]  // Dichte Wasser
  Q_Heat_rate = 0.05[W]  // Heizrate
  v_Wasser = 0.1[m/s]  // Geschwindigkeit des Wassers
  R_Total = 0.7[mm]  // Radius des Rohres
  R_aussen = 0.2[mm]  // Radius des Rohres aussen
  R_innen = R_Total - R_aussen  // Radius des Rohres innen
  c_Aluminium = 904[J/kg/K]  // spezifische Wärmekapazität Aluminium
  k_Aluminium = 235[W/m/K]  // Wärmeleitfähigkeit Aluminium
  rho_Aluminium = 2700[kg/m^3]  // Dichte Aluminium
  c_Glas = 840[J/kg/K]  // spezifische Wärmekapazität Glas
  k_Glas = 0.8[W/m/K]  // Wärmeleitfähigkeit Glas
  rho_Glas = 2500[kg/m^3]  // Dichte Glas

Variables
  var1 "Variables 1"
    v_Wasser_Parabel = v_Wasser * (1 - (r/R_innen)^2)
    r = sqrt(y^2 + z^2)

Probes
  dom1: Domain "Sensor_1_Aluminium" on domains 3
    expr = T
    unit = degC
    descr = Temperature
    frame = material
    table = tbl1
  dom2: Domain "Sensor_2_Aluminium" on domains 5
    expr = T
    unit = degC
    descr = Temperature
    frame = material
    table = tbl1
  dom3: Domain "Sensor_1_Glas" on domains 3 | expr = T; unit = degC; descr = Temperature; frame = material; table = tbl1
  dom4: Domain "Sensor_2_Glas" on domains 5 | expr = T; unit = degC; descr = Temperature; frame = material; table = tbl1

Geometry
  geom1 "Geometry 1" (3D, length unit mm)
    cyl1: Cylinder | r = R_innen; h = 11
    cyl2: Cylinder | r = R_Total; h = 11
    wp1: WorkPlane | quickplane = zx; quicky = -R_Total; unite = on
      c1: Circle | pos = {2.5, 0}; r = 0.1
      c2: Circle | pos = {5.5, 0}; r = 0.1
      c3: Circle | pos = {8.5, 0}; r = 0.1
    ext1: Extrude | workplane = wp1; input = wp1; distance = 2*R_Total
    wp2: WorkPlane | unite = on
      cro1: CrossSection
      ls1: LineSegment | vertex1 = cro1.cyl2 points 1; vertex2 = cro1.cyl2 points 4
      ls2: LineSegment | vertex1 = cro1.cyl2 points 3; vertex2 = cro1.cyl2 points 2
    ext2: Extrude | workplane = wp2; input = wp2; distance = 11
    del2: Delete "Delete Entities 2" | input = cyl1(1) domains 1; cyl2(1) domains 1
    pard2: PartitionDomains
      domain = ext1(1) domains 1-3
      partitionwith = faces
      workplane = wp2
      face = ext2(1) boundaries 9, 19, 23, 24
    del1: Delete "Delete Entities 1" | input = ext2(1) domains 1-4, 7, 8; pard2(1) domains 4-6
    pard3: PartitionDomains
      domain = del1(2) domains 1-3
      partitionwith = faces
      workplane = wp2
      face = del1(1) boundaries 1, 2, 5
    del4: Delete "Delete Entities 4" | input = pard3(1) boundaries 1-12, 14, 17, 19, 21, 24, 26, 28, 31, 33
    rot1: Rotate | input = del1(1), del4; rot = 90
    rot2: Rotate | input = rot1; axistype = y; rot = 90
    fin: Finalize "Form Union"
    cmd1: CompositeDomains "Form Composite Domains 1" | input = fin(1) domains 1
    cmd2: CompositeDomains "Form Composite Domains 2" | input = cmd1(1) domains 2
    cmd3: CompositeDomains "Form Composite Domains 3" | input = cmd2(1) domains 3-8

Materials
  mat1: Common "Wasser" on domains 2
    def "Basic"
      thermalconductivity = k_Wasser
      density = rho_Wasser
      heatcapacity = c_Wasser
      dynamicviscosity = 1.002*10^-3
  mat4: Common "Wärmequelle_Sensoren_Aluminium" on domains 3-5
    def "Basic"
      heatcapacity = c_Aluminium
      thermalconductivity = k_Aluminium
      density = rho_Aluminium
  sw1: Switch "Material Switch 1" on domains 1
    mat2: Common "Aluminium"
      def "Basic"
        heatcapacity = c_Aluminium
        thermalconductivity = k_Aluminium
        density = rho_Aluminium
    mat3: Common "Glas"
      def "Basic"
        heatcapacity = c_Glas
        thermalconductivity = k_Glas
        density = rho_Glas

Physics
  ht: HeatTransferInSolidsAndFluids on all domains
    dependent variable T
    solid1: SolidHeatTransferModel "Solid 1" (default)
    init1: init "Initial Values 1" (default)
    ins1: ThermalInsulation (default)
    temp1: TemperatureBoundary "Temperature 1" on boundaries 4 | T0 = 20[degC]
    hs1: HeatSource on domains 4 | heatSourceType = HeatRate; P0 = Q_Heat_rate; Q0 = 5*10^9; materialType = from_mat
    sym1: Symmetry on boundaries 2, 5, 7, 8, 10, 13, 16, 17, 19, 22, 25, 26, 28, 31, 34, 35
    fluid2: FluidHeatTransferModel "v_Wasser_Parabel" on domains 2 | u = {v_Wasser_Parabel, 0, 0}
  spf: TurbulentFlowAlgebraicYplus on domains 2
    dependent variable u = {u, v, w}
    fp1: FluidProperties (default)
    init1: init "Initial Values 1" (default) | u_init = {v_Wasser, 0, 0}
    wallbc1: WallBC "Wall 1" (default)
    inl1: InletBoundary "Inlet 1" on boundaries 4
      ComponentWise = VelocityFieldComponentWise
      U0in = v_Wasser
      u0 = {v_Wasser, 0, 0}
    out1: OutletBoundary "Outlet 1" on boundaries 37

Mesh
  mesh1 "Mesh 1" (physics-controlled)

Studies
  std1 "Study 1"
    matsw: MaterialSweep | pname = matsw.comp1.sw1; plistarr = range(1,1,2); pcase = all; useaccumtable = on
    stat: Stationary | useparam = on; sweeptype = filled; pname = v_Wasser; plistarr = range(0.1,0.05,1); punit = m/s

Solver configurations
  sol1 "Solution 1" (study std1)
    v1: Variables "Dependent Variables 1"
    s1: Stationary "Stationary Solver 1"
      p1: Parametric | sweeptype = filled; pname = v_Wasser; plistarr = range(0.1,0.05,1); punit = m/s
      se1: Segregated | maxsegiter = 400; segstabacc = segcflcmp; subinitcfl = 2
        ss1: SegregatedStep "Temperature" | segvar = {comp1_T}; linsolver = d1; subdamp = 0.8
        ss2: SegregatedStep "Velocity u, Pressure p" | segvar = {comp1_p, comp1_u}; linsolver = i1; subdamp = 0.5
        ss3: SegregatedStep "Turbulence Variables"
          segvar = {comp1_yPlus}
          linsolver = i2
          subdamp = 0.45
          subtermconst = itertol
          subiter = 3
          subntolfact = 1
        ll1: LowerLimit | lowerlimit = comp1.yPlus 0 comp1.T 0
      d1: Direct "Direct, heat transfer variables (ht)" | linsolver = pardiso; pivotperturb = 1.0E-13
      i1: Iterative "AMG, fluid flow variables (spf)" | nlinnormuse = on; maxlinit = 1000; rhob = 20
        mg1: Multigrid | prefun = saamg; maxcoarsedof = 80000; strconn = 0.02; saamgcompwise = on
      i2: Iterative "AMG, turbulence variables (spf)" | nlinnormuse = on; maxlinit = 1000
        mg1: Multigrid | prefun = saamg; maxcoarsedof = 50000; saamgcompwise = on
  sol2 "Parametric Solutions 1" (study std1)

Datasets
  dset1: Solution | solution = sol1
  dset2: Solution | solution = sol2
  dset3: Solution "Probe Solution 3" | solution = sol1
  avh1: Average "Sensor_1_Aluminium" on domains 3 | data = dset3
  avh2: Average "Sensor_2_Aluminium" on domains 5 | data = dset3
  avh3: Average "Sensor_1_Glas" on domains 3 | data = dset3
  avh4: Average "Sensor_2_Glas" on domains 5 | data = dset3
  dset4: Solution | solution = sol2
  surf1: Surface "Exterior Walls" on boundaries 5-7, 12, 15, 17, 21, 24, 26, 30, 33, 35 | data = dset2

Derived values
  pev1: EvalPoint "Sensor_1_Aluminium" | data = avh1; table = tbl2; expr = T
  pev2: EvalPoint "Sensor_2_Aluminium" | data = avh2; table = tbl2; expr = T
  pev3: EvalPoint "Sensor_1_Glas" | data = avh3; table = tbl2; expr = T
  pev4: EvalPoint "Sensor_2_Glas" | data = avh4; table = tbl2; expr = T

Tables
  tbl1: Table "Probe Table 1"
    v_Wasser (m/s) | Temperature (degC), Sensor_1_Aluminium | Temperature (degC), Sensor_2_Aluminium | Temperature (degC), Sensor_1_Glas | Temperature (degC), Sensor_2_Glas
    0.1 | 20 | 22.1289 | 20 | 22.1289
    0.15 | 20 | 21.6246 | 20 | 21.6246
    0.2 | 20 | 21.3394 | 20 | 21.3394
    0.25 | 20 | 21.1542 | 20 | 21.1542
    0.3 | 20 | 21.0242 | 20 | 21.0242
    0.35 | 20 | 20.9277 | 20 | 20.9277
    0.4 | 20 | 20.853 | 20 | 20.853
    0.45 | 20 | 20.7937 | 20 | 20.7937
    0.5 | 20 | 20.745 | 20 | 20.745
    0.55 | 20 | 20.7044 | 20 | 20.7044
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  tbl2: Table "Accumulated Probe Table 2"
    Material Switch 1 index | v_Wasser (m/s) | Temperature (degC), Sensor_1_Aluminium | Temperature (degC), Sensor_2_Aluminium | Temperature (degC), Sensor_1_Glas | Temperature (degC), Sensor_2_Glas
    1 | 0.1 | 20.314 | 21.3542 | 20.314 | 21.3542
    1 | 0.15 | 20.2147 | 21.0567 | 20.2147 | 21.0567
    1 | 0.2 | 20.164 | 20.885 | 20.164 | 20.885
    1 | 0.25 | 20.1334 | 20.7707 | 20.1334 | 20.7707
    1 | 0.3 | 20.1129 | 20.6886 | 20.1129 | 20.6886
    1 | 0.35 | 20.0982 | 20.6264 | 20.0982 | 20.6264
    1 | 0.4 | 20.0872 | 20.5776 | 20.0872 | 20.5776
    1 | 0.45 | 20.0785 | 20.5382 | 20.0785 | 20.5382
    1 | 0.5 | 20.0716 | 20.5057 | 20.0716 | 20.5057
    1 | 0.55 | 20.0659 | 20.4782 | 20.0659 | 20.4782
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
Plots
  pg1: PlotGroup1D "Probe Plot Group 1" | xlabel = v_Wasser (m/s)
    tblp3: Table "Probe Table Graph 3" | table = tbl2; xaxisdata = 2
  pg4: PlotGroup3D "Temperature (ht) 1" | data = dset2
    vol1: Volume | expr = T; unit = degC
  pg5: PlotGroup3D "Velocity (spf)" | data = dset2
    slc2: Slice | expr = spf.U; quickplane = xy; quickznumber = 1
    slc3: Slice
      expr = spf.U
      quickplane = zx
      quickymethod = coord
      quicky = 0.1
      genpoints = {{0, 0.5, 0.5}, {11, 0.5, 0.5}, {0, 0, 0}}