// COMSOL Multiphysics 6.2.0.290 model "A1_Arbeitspunkt.mph"
// Outline of the model tree

Parameters
  ri = 0.025 [m]  // Innenradius
  ra = 0.1 [m]  // Aussenradius
  Ti = 80 [degC]  // Innentemperatur
  Ta = 20 [degC]  // Umgebungstemperatur
  ha = 5 [W/(m^2*K)]  // Wärmeübergangskoeffizient
  k = 0.5 [W/(m*K)]  // Wärmeleitfähigkeit

Geometry
  geom1 "Geometry 1" (1D axisymmetric, length unit m)
    i1: Interval | coord = {ri, ra}
    i2: Interval | coord = {0, ri}
    fin: Finalize "Form Union"

Materials
  mat1: Common "Material 1" on all domains
    def "Basic"
      thermalconductivity = k
      density = 1
      heatcapacity = 1

Physics
  ht: HeatTransfer "Heat Transfer in Solids" on all domains
    dependent variable T
    solid1: SolidHeatTransferModel "Solid 1" (default)
    init1: init "Initial Values 1" (default) | Tinit = 273.15[K]
    axi1: AxialSymmetry (default)
    ins1: ThermalInsulation (default)
    temp1: TemperatureBoundary "Temperature 1" on boundaries 2 | T0 = Ti
    hf1: HeatFluxBoundary "Heat Flux 1" on boundaries 3
      HeatFluxType = ConvectiveHeatFlux
      h = ha
      Text = Ta
      materialType = from_mat

Mesh
  mesh1 "Mesh 1" (physics-controlled)
    size: MeshSizeDefault | hauto = 1

Studies
  std1 "Study 1"
    stat: Stationary

Solver configurations
  sol1 "Solution 1" (study std1)
    v1: Variables "Dependent Variables 1"
    s1: Stationary "Stationary Solver 1"
      fc1: FullyCoupled | linsolver = d1; initstep = 0.01; minstep = 1.0E-6; maxiter = 50
      d1: Direct "Direct, heat transfer variables (ht)" | linsolver = pardiso; pivotperturb = 1.0E-13

Datasets
  dset1: Solution | solution = sol1

Plots
  pg1: PlotGroup1D "Temperature (ht)" | data = dset1
    lngr1: LineGraph on domains 2 | expr = T; unit = degC; xdata = expr; xdataexpr = r

Exports
  data1: Data "Data_A1_Arbeitspunkt3"
    data = dset1
    expr = T
    unit = degC
    filename = C:\Users\mauro.schegg\OneDrive - OST\Unterricht\HS2024\CP\Abgabe_Comsol\Data_A1_Arbeitspunkt01.csv
    separator = ,